! 端部铰接杆的屈曲(面积单元)
/COM,ANSYS MEDIA REL. 2023R1 (11/04/2022) REF. VERIF. MANUAL: REL. 2023R1
/VERIFY,VM128
/PREP7
MP,PRXY,,0.3
/TITLE, VM128, BUCKLING OF A BAR WITH HINGED SOLVES (AREA ELEMENTS)
C***    STR. OF MATL., TIMOSHENKO, PART 2, 3RD ED., PAGE 148
ET,1,PLANE182,2,,3               ! 2-D SOLID
R,1,.5                           ! THICKNESS (SQUARE CROSS-SECTION)
MP,EX,1,30E6
MP,PRXY,1,0.3
N,1
N,11,,100
FILL
NGEN,2,11,1,11,,.5
E,12,13,2,1
EGEN,10,1,1
FINISH
/SOLU
ANTYPE,STATIC
RESCONTROL,LINEAR,ALL,1         ! RESTART FILES FOR SUBSEQUENT LINEAR PERTURBATION
D,1,ALL,,,12,11                 ! FIX SYMMETRY SOLVE
F,11,FY,-.5,,22,11              ! UNIT LOAD AT FREE END DIVIDED BETWEEN NODES
OUTPR,,1
/OUT,SCRATCH
SOLVE
FINISH
/SOLU
ANTYPE,STATIC,RESTART,,,PERTURB ! PERFORM A PERTURBATION ANALYSIS
PERTURB,BUCKLE,,,ALLKEEP        ! PERTURBED BUCKLING SOLVE
SOLVE,ELFORM                    ! REFORM ELEMENT MATRICES

BUCOPT,SUBSPACE,1               ! USE SUBSPACE EXTRACTION METHOD, EXTRACT 1 MODE
MXPAND,1                        ! EXPAND 1 MODE SHAPE
SOLVE
/OUT,
*GET,FCR,MODE,1,FREQ
*STATUS,PARM
*DIM,LABEL,CHAR,1,2
*DIM,VALUE,,1,3
LABEL(1,1) = 'Fcr '
LABEL(1,2) = 'lb '
*VFILL,VALUE(1,1),DATA,38.553
*VFILL,VALUE(1,2),DATA,FCR
*VFILL,VALUE(1,3),DATA,ABS(FCR/38.553)
/OUT,vm128,vrt
/COM,--------------------- vm128 RESULTS COMPARSION ---------------
/COM,
/COM, BLOCK LANCZOS SOLUTION
/COM,
*VWRITE,LABEL(1,1),LABEL(1,2),VALUE(1,1),VALUE(1,2),VALUE(1,3)
(1X,A8,A8,'   ',F10.3,'  ',F10.3,'   ',1F5.3)
/COM,
/COM,
/COM,---------------------------------------------------------------
/OUT
FINISH
*LIST,vm128,vrt
